*Heading
** Job name: RVE-PBC Model name: RVE-test1
** Generated by: Abaqus/CAE 2019
*Preprint, echo=NO, model=NO, history=NO, contact=NO
**
*RESTART, READ, STEP=STEP_REPLACE, INC = INC_REPLACE
** ----------------------------------------------------------------
** ----------------------------------------------------------------
**
** STEP: Step-1
**
*Step, name=perturbation, nlgeom=NO, perturbation
*Static
**
** OUTPUT REQUESTS
**
**
** FIELD OUTPUT: F-Output-0
**
*Output, field, variable=PRESELECT
**
** LOAD CASES
**
*Load Case, name=LoadCase-XX
** Name: BC-xx Type: Displacement/Rotation   Scale factor: 1
*Boundary
Set-x+, 1, 1, 1e-06
Set-x-, 1, 1, -1e-06
*End Load Case
*Load Case, name=LoadCase-yy
** Name: BC-yy Type: Displacement/Rotation   Scale factor: 1
*Boundary
Set-y+, 1, 1, 1e-06
Set-y-, 1, 1, -1e-06
*End Load Case
*Load Case, name=LoadCase-zz
** Name: BC-yy Type: Displacement/Rotation   Scale factor: 1
*Boundary
Set-z+, 1, 1, 1e-06
Set-z-, 1, 1, -1e-06
*End Load Case
*End Step
** ----------------------------------------------------------------
**
** STEP: Step-2
**
*Step, name=Step-1, nlgeom=NO
*Static
1., 1., 1e-05, 1.
**
** BOUNDARY CONDITIONS
**
** Name: BC-1 Type: Displacement/Rotation
*Boundary
Set-x+, 1, 1, 0.01
** Name: BC-2 Type: Displacement/Rotation
*Boundary
Set-x-, 1, 1, -0.01
**
** OUTPUT REQUESTS
**
*Restart, write, frequency=1
**
** FIELD OUTPUT: F-Output-1
**
*Output, field, variable=PRESELECT
*Output, history, frequency=1
*End Step
